# 4 Пункт:
Uвх(t) := 10*cos(2000*t)
Uвых(t) := 0.57*cos(2000*t - 1.446)
# 7 пункт:
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Z(w) := 40 + (24j*w + 60*76)/(136 + 0.4j*w)
Zвх(w) := ((1360000 + 16*w^2)^2 + (40*36*w)^2)^(1/2)/(136^2 + 0.4^2*w^2)
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p(w) := atan((40*36*w)/(1360000 + 16*w^2))
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ImZ(w) := (40*36*w)/(136^2 + 0.4^2*w^2)
ReZ(w) := (1360000 + 16*w^2)/(136^2 + 0.4^2*w^2)
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# 8 пункт:
w := 2000
I := (136 + 0.4j*w)/(10000 + 40j*w)
I = 0.0100554 - 0.000443077i
|I| = 0.0100651
phi := -0.044281
Iвх(t) := 0.02*cos(2000*t - 0.044281)
Uвх(t) := cos(2000*t)
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# 9 пункт:
K(w) := 114/(250 + 1j*w)
K(w) = 0.00701538 - 0.0561231i
R := (76*(24 + 0.4j*w)/(100 + 0.4j*w)) = 75.1114 + 7.10892i
Zэ := 64*R = 4807.13 + 454.971i
|Zэ| = 4828.61
pi := 3.14
# 5 пункт:
# Диаграммы напряжений на входе и на выходе
Sвх(t) := 1/2 + 2*cos(2000*t)/pi + 2*cos(6000*t + pi)/(3*pi) + 2*cos(10000*t)/(5*pi) + 2*cos(14000*t + pi)/(7*pi) + 2*cos(18000*t)/(9*pi)
Sвых(t) := 0.228 + 2*0.057*cos(2000*t - 1.446)/pi + 2*0.019*cos(6000*t + 1.612)/(3*pi) + 2*0.011*cos(10000*t - 1.546)/(5*pi) + 2*0.008*cos(14000*t + 1.589)/(7*pi) + 2*0.006*cos(18000*t - 1.557)/(9*pi)
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# Увеличенный сигнал на выходе (необяз)
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# Графики гармоник выходного напряжения:
S1(t) := 2*0.057*cos(2000*t - 1.446)/pi
S3(t) := 2*0.019*cos(6000*t + 1.612)/(3*pi)
S5(t) := 2*0.011*cos(10000*t - 1.546)/(5*pi)
S7(t) := 2*0.008*cos(14000*t + 1.589)/(7*pi)
S9(t) := 2*0.006*cos(18000*t - 1.557)/(9*pi)
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